Duck Force One
0.0                        !Mach
0    0    0.0              !iYsym  iZsym  Zsym
0.3600   0.3000   1.2000     !Sref  Cref  Bref
0.0394   0.0000   -0.0092    !Xref  Yref  Zref (CG location)

#=============================================================
SURFACE
Main Wing
12  1.0  4  1.0          !Nspan Sspace Nchord Cspace

YDUPLICATE
0.0

ANGLE
0.0

SECTION
#Xle      Yle    Zle    chord   angle
0.0000    0.0000  0.0000  0.3000    0.00
AFILE
"C:\Users\kaspe\OneDrive\Cornell\All\Coding\end-of-semester-25-26\src\avl\wortmanFX60-126.dat"

SECTION
#Xle      Yle       Zle       chord     angle
0.0000    0.6000    0.0000    0.3000    0.00
AFILE
"C:\Users\kaspe\OneDrive\Cornell\All\Coding\end-of-semester-25-26\src\avl\wortmanFX60-126.dat"

CONTROL
aileron    1.0   0.75    0.0 0.0 0.0    -1.0


#=============================================================
SURFACE
Horizontal Stabilizer
8  1.0  4  1.0          !Nspan Sspace Nchord Cspace

YDUPLICATE
0.0

ANGLE
-2.0

SECTION
#Xle      Yle    Zle    chord   angle
0.8917    0.0000  0.0000  0.1333    0.00
NACA
0012

CONTROL
elevator   1.0   0.70    0.0 0.0 0.0     1.0

SECTION
#Xle      Yle       Zle       chord     angle
0.8917    0.2000    0.0000    0.1333    0.00
NACA
0012

CONTROL
elevator   1.0   0.70    0.0 0.0 0.0     1.0


#=============================================================
SURFACE
Vertical Stabilizer
6  1.0  4  1.0          !Nspan Sspace Nchord Cspace

SECTION
#Xle      Yle    Zle       chord   angle
0.8917    0.0000  0.0000  0.1250    0.00
NACA
0012

CONTROL
rudder   1.0   0.70    0.0 0.0 0.0     1.0

SECTION
#Xle                  Yle    Zle (tip height)   chord   angle
0.8917    0.0000  0.2500  0.1250    0.00
NACA
0012

CONTROL
rudder   1.0   0.70    0.0 0.0 0.0     1.0
